*Heading
** Job name: A3_1 Model name: A3
** Generated by: Abaqus/CAE 2023
*Preprint, echo=NO, model=NO, history=NO, contact=NO
**
** PARTS
**
*Part, name=tanpian_abaqus-1
*Node
      1,  -2.62905669,   17.0876465,   10.3724661
      2,   -10.698945,   17.0876465,  0.180464864
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*Element, type=C3D8R
  1,  768,  769, 3644, 3578,   44,   45,  667,  666
  2,  769,  770, 3645, 3644,   45,   46,  668,  667
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*Nset, nset=Set-B-ALL, generate
    1,  6645,     1
*Elset, elset=Set-B-ALL, generate
    1,  4816,     1
** Section: Section-1
*Solid Section, elset=Set-B-ALL, controls=EC-1, material=steel_elas-plastic
,
*End Part
**
*Part, name=tanpian_abaqus-6_1
*Node
      1,         -9.5,           0.,          85.
      2,  -11.5384617,  -4.80769253,          85.
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*Element, type=C3D8R
  1,   58,  858,  857,   59, 1445, 3770, 3769, 1444
  2,  858,   51,   50,  857, 3770,  991,  990, 3769
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*Node
   5281,           0., 5.81707235e-16,          85.
*Nset, nset=tanpian_abaqus-6_1-RefPt_, internal
5281,
*Nset, nset=Set-TN-ALL, generate
    1,  5280,     1
*Elset, elset=Set-TN-ALL, generate
    1,  3440,     1
*Nset, nset=Set-TN-RP
 5281,
** Section: Section-1
*Solid Section, elset=Set-TN-ALL, controls=EC-2, material=steel_elas-plastic
,
*End Part
**
*Part, name=tanpian_abaqus-7
*Node
      1,   15.7564659,   20.4928894,  -4.89732409
      2,   14.3240595,   20.4928894,  -4.45211267
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*Element, type=C3D8R
 1,  72,  77, 649, 609,   1,   2,  25,  44
 2, 609, 649, 650, 610,  44,  25,  26,  43
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*Node
   4049, -1.42108547e-14,   99.8622055, 8.8817842e-15
*Nset, nset=tanpian_abaqus-7-RefPt_, internal
4049,
*Nset, nset=Set-TW-RP
 4049,
*Nset, nset=Set-TW-ALL, generate
    1,  4048,     1
*Elset, elset=Set-TW-ALL, generate
    1,  1980,     1
** Section: Section-1
*Solid Section, elset=Set-TW-ALL, controls=EC-2, material=steel_elas-plastic
,
*End Part
**
**
** ASSEMBLY
**
*Assembly, name=Assembly
**
*Instance, name=tanpian_abaqus-1-1, part=tanpian_abaqus-1
*End Instance
**
*Instance, name=tanpian_abaqus-7-1, part=tanpian_abaqus-7
*End Instance
**
*Instance, name=tanpian_abaqus-1-1-rad-2, part=tanpian_abaqus-1
          0.,           0.,           0.
          0.,           0.,           0.,           0., 1.00000001268805,           0., 89.9999992730282
*End Instance
**
*Instance, name=tanpian_abaqus-1-1-rad-3, part=tanpian_abaqus-1
          0.,           0.,           0.
          0.,           0.,           0.,           0.,           1.,           0.,         180.
*End Instance
**
*Instance, name=tanpian_abaqus-1-1-rad-4, part=tanpian_abaqus-1
          0.,           0.,           0.
          0.,           0.,           0.,           0., -1.00000001268805,           0., 89.9999992730282
*End Instance
**
*Instance, name=tanpian_abaqus-6_1-1, part=tanpian_abaqus-6_1
          0.,    21.584009,           0.
          0.,    21.584009,           0., 0.238919272554826, 22.2706375638781, 0.686628563878054, 206.874340446581
*End Instance
**
*Node
      1,           0.,         120.,           0.
*Nset, nset=Set-BAN-RP
 1,
*Nset, nset=Set-KONG, instance=tanpian_abaqus-1-1
   23,   24,   25,   26,   31,   32
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*Nset, nset=Set-KONG, instance=tanpian_abaqus-1-1-rad-2
   23,   24,   25,   26,   31,   32
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*Nset, nset=Set-KONG, instance=tanpian_abaqus-1-1-rad-3
   23,   24,   25,   26,   31,   32
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*Nset, nset=Set-KONG, instance=tanpian_abaqus-1-1-rad-4
   23,   24,   25,   26,   31,   32
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*Elset, elset=Set-KONG, instance=tanpian_abaqus-1-1
 4073, 4074, 4085, 4098, 4099, 4100
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*Elset, elset=Set-KONG, instance=tanpian_abaqus-1-1-rad-2
 4073, 4074, 4085, 4098, 4099, 4100
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*Elset, elset=Set-KONG, instance=tanpian_abaqus-1-1-rad-3
 4073, 4074, 4085, 4098, 4099, 4100
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*Elset, elset=Set-KONG, instance=tanpian_abaqus-1-1-rad-4
 4073, 4074, 4085, 4098, 4099, 4100
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*Elset, elset=_m_Surf-1_S4, internal, instance=tanpian_abaqus-7-1
    1,    2,    3,    4,    5,    6
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*Elset, elset=_m_Surf-1_S1, internal, instance=tanpian_abaqus-7-1
  45,  46,  47,  48,  49,  50
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*Elset, elset=_m_Surf-1_S2, internal, instance=tanpian_abaqus-7-1, generate
 1486,  1540,     1
*Elset, elset=_m_Surf-1_S5, internal, instance=tanpian_abaqus-7-1, generate
 111,  165,    1
*Surface, type=ELEMENT, name=m_Surf-1
_m_Surf-1_S4, S4
_m_Surf-1_S1, S1
_m_Surf-1_S2, S2
_m_Surf-1_S5, S5
*Elset, elset=_s_Surf-1_S3, internal, instance=tanpian_abaqus-1-1
 337, 338, 339, 340, 341, 342
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*Elset, elset=_s_Surf-1_S3, internal, instance=tanpian_abaqus-1-1-rad-2
 337, 338, 339, 340, 341, 342
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*Elset, elset=_s_Surf-1_S3, internal, instance=tanpian_abaqus-1-1-rad-3
 337, 338, 339, 340, 341, 342
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*Elset, elset=_s_Surf-1_S3, internal, instance=tanpian_abaqus-1-1-rad-4
 337, 338, 339, 340, 341, 342
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*Elset, elset=_s_Surf-1_S2, internal, instance=tanpian_abaqus-1-1
   1,   2,   3,   4,   5,   6
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*Elset, elset=_s_Surf-1_S2, internal, instance=tanpian_abaqus-1-1-rad-2
   1,   2,   3,   4,   5,   6
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*Elset, elset=_s_Surf-1_S2, internal, instance=tanpian_abaqus-1-1-rad-3
   1,   2,   3,   4,   5,   6
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*Elset, elset=_s_Surf-1_S2, internal, instance=tanpian_abaqus-1-1-rad-4
   1,   2,   3,   4,   5,   6
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*Surface, type=ELEMENT, name=s_Surf-1
_s_Surf-1_S3, S3
_s_Surf-1_S2, S2
*Surface, type=NODE, name=Set-KONG_CNS_, internal
Set-KONG, 1.
** Constraint: Constraint-1
*Rigid Body, ref node=tanpian_abaqus-6_1-1.Set-TN-RP, elset=tanpian_abaqus-6_1-1.Set-TN-ALL, position=CENTER OF MASS
** Constraint: Constraint-2
*Rigid Body, ref node=tanpian_abaqus-7-1.Set-TW-RP, elset=tanpian_abaqus-7-1.Set-TW-ALL, position=CENTER OF MASS
** Constraint: Constraint-3
*Coupling, constraint name=Constraint-3, ref node=Set-BAN-RP, surface=Set-KONG_CNS_
*Kinematic
*Elset, elset=__Int-1_gcs0_2_S3, internal, instance=tanpian_abaqus-1-1
 169, 170, 171, 172, 173, 174
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*Elset, elset=__Int-1_gcs0_2_S4, internal, instance=tanpian_abaqus-1-1, generate
 218,  336,    2
*Surface, type=ELEMENT, name=_Int-1_gcs0_2, internal
__Int-1_gcs0_2_S3, S3
__Int-1_gcs0_2_S4, S4
*Elset, elset=__Int-1_gcs0_3_S3, internal, instance=tanpian_abaqus-1-1
 337, 338, 339, 340, 341, 342
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*Surface, type=ELEMENT, name=_Int-1_gcs0_3, internal
__Int-1_gcs0_3_S3, S3
*Elset, elset=__Int-1_gcs0_13_S5, internal, instance=tanpian_abaqus-1-1
 370, 371, 372, 373, 374, 375
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*Surface, type=ELEMENT, name=_Int-1_gcs0_13, internal
__Int-1_gcs0_13_S5, S5
*Elset, elset=__Int-1_gcs0_14_S4, internal, instance=tanpian_abaqus-1-1
 4636, 4640, 4652, 4656, 4668, 4672
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*Surface, type=ELEMENT, name=_Int-1_gcs0_14, internal
__Int-1_gcs0_14_S4, S4
*Elset, elset=__Int-1_gcs0_15_S5, internal, instance=tanpian_abaqus-1-1
 4073, 4074, 4102, 4221, 4222, 4250, 4369, 4370, 4398, 4517, 4518, 4546
*Elset, elset=__Int-1_gcs0_15_S4, internal, instance=tanpian_abaqus-1-1
 4085, 4098, 4099, 4100, 4101, 4233
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*Surface, type=ELEMENT, name=_Int-1_gcs0_15, internal
__Int-1_gcs0_15_S5, S5
__Int-1_gcs0_15_S4, S4
*Elset, elset=__Int-1_gcs0_16_S4, internal, instance=tanpian_abaqus-1-1
 4131, 4133, 4146, 4147, 4148, 4279
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*Elset, elset=__Int-1_gcs0_16_S5, internal, instance=tanpian_abaqus-1-1
 4134, 4135, 4149, 4282, 4283, 4297, 4430, 4431, 4445, 4578, 4579, 4593
*Surface, type=ELEMENT, name=_Int-1_gcs0_16, internal
__Int-1_gcs0_16_S4, S4
__Int-1_gcs0_16_S5, S5
*Elset, elset=__Int-1_gcs0_24_S4, internal, instance=tanpian_abaqus-1-1
 4154, 4179, 4180, 4302, 4327, 4328, 4450, 4475, 4476, 4598, 4623, 4624
*Elset, elset=__Int-1_gcs0_24_S5, internal, instance=tanpian_abaqus-1-1
 4155, 4156, 4157, 4166, 4167, 4303
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*Surface, type=ELEMENT, name=_Int-1_gcs0_24, internal
__Int-1_gcs0_24_S4, S4
__Int-1_gcs0_24_S5, S5
*Elset, elset=__Int-1_gcs0_25_S4, internal, instance=tanpian_abaqus-1-1
 4110, 4111, 4120, 4121, 4258, 4259, 4268, 4269, 4406, 4407, 4416, 4417, 4554, 4555, 4564, 4565
*Elset, elset=__Int-1_gcs0_25_S5, internal, instance=tanpian_abaqus-1-1
 4112, 4122, 4123, 4124, 4260, 4270, 4271, 4272, 4408, 4418, 4419, 4420, 4556, 4566, 4567, 4568
*Surface, type=ELEMENT, name=_Int-1_gcs0_25, internal
__Int-1_gcs0_25_S4, S4
__Int-1_gcs0_25_S5, S5
*Elset, elset=__Int-1_gcs0_26_S6, internal, instance=tanpian_abaqus-1-1
 4633, 4637, 4649, 4653, 4665, 4669
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*Surface, type=ELEMENT, name=_Int-1_gcs0_26, internal
__Int-1_gcs0_26_S6, S6
*Elset, elset=__Int-1_gcs0_27_S2, internal, instance=tanpian_abaqus-1-1
   1,   2,   3,   4,   5,   6
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*Surface, type=ELEMENT, name=_Int-1_gcs0_27, internal
__Int-1_gcs0_27_S2, S2
*Elset, elset=__Int-1_gcs0_32_S1, internal, instance=tanpian_abaqus-1-1, generate
 4625,  4640,     1
*Surface, type=ELEMENT, name=_Int-1_gcs0_32, internal
__Int-1_gcs0_32_S1, S1
*Elset, elset=__Int-1_gcs0_33_S2, internal, instance=tanpian_abaqus-1-1, generate
 4801,  4816,     1
*Surface, type=ELEMENT, name=_Int-1_gcs0_33, internal
__Int-1_gcs0_33_S2, S2
*Elset, elset=__Int-1_gcs0_44_S3, internal, instance=tanpian_abaqus-7-1, generate
 1046,  1485,     1
*Surface, type=ELEMENT, name=_Int-1_gcs0_44, internal
__Int-1_gcs0_44_S3, S3
*Elset, elset=__Int-1_gcs0_47_S5, internal, instance=tanpian_abaqus-7-1, generate
 1046,  1485,     1
*Surface, type=ELEMENT, name=_Int-1_gcs0_47, internal
__Int-1_gcs0_47_S5, S5
*Elset, elset=__Int-1_gcs0_49_S6, internal, instance=tanpian_abaqus-7-1, generate
 166,  605,    1
*Surface, type=ELEMENT, name=_Int-1_gcs0_49, internal
__Int-1_gcs0_49_S6, S6
*Elset, elset=__Int-1_gcs0_50_S4, internal, instance=tanpian_abaqus-7-1, generate
  606,  1045,     1
*Surface, type=ELEMENT, name=_Int-1_gcs0_50, internal
__Int-1_gcs0_50_S4, S4
*Elset, elset=__Int-1_gcs0_54_S2, internal, instance=tanpian_abaqus-7-1, generate
 1486,  1540,     1
*Surface, type=ELEMENT, name=_Int-1_gcs0_54, internal
__Int-1_gcs0_54_S2, S2
*Elset, elset=__Int-1_gcs0_55_S6, internal, instance=tanpian_abaqus-7-1, generate
  1,  55,   1
*Surface, type=ELEMENT, name=_Int-1_gcs0_55, internal
__Int-1_gcs0_55_S6, S6
*Elset, elset=__Int-1_gcs0_56_S4, internal, instance=tanpian_abaqus-7-1, generate
  56,  110,    1
*Surface, type=ELEMENT, name=_Int-1_gcs0_56, internal
__Int-1_gcs0_56_S4, S4
*Elset, elset=__Int-1_gcs0_59_S6, internal, instance=tanpian_abaqus-7-1, generate
  56,  110,    1
*Surface, type=ELEMENT, name=_Int-1_gcs0_59, internal
__Int-1_gcs0_59_S6, S6
*Elset, elset=__Int-1_gcs0_60_S6, internal, instance=tanpian_abaqus-7-1, generate
 1541,  1980,     1
*Surface, type=ELEMENT, name=_Int-1_gcs0_60, internal
__Int-1_gcs0_60_S6, S6
*Elset, elset=__Int-1_gcs0_61_S5, internal, instance=tanpian_abaqus-7-1, generate
 111,  165,    1
*Surface, type=ELEMENT, name=_Int-1_gcs0_61, internal
__Int-1_gcs0_61_S5, S5
*Elset, elset=__Int-1_gcs0_62_S1, internal, instance=tanpian_abaqus-7-1, generate
 1486,  1540,     1
*Surface, type=ELEMENT, name=_Int-1_gcs0_62, internal
__Int-1_gcs0_62_S1, S1
*Elset, elset=__Int-1_gcs0_63_S6, internal, instance=tanpian_abaqus-7-1, generate
  606,  1045,     1
*Surface, type=ELEMENT, name=_Int-1_gcs0_63, internal
__Int-1_gcs0_63_S6, S6
*Elset, elset=__Int-1_gcs0_64_S4, internal, instance=tanpian_abaqus-7-1, generate
 1541,  1980,     1
*Surface, type=ELEMENT, name=_Int-1_gcs0_64, internal
__Int-1_gcs0_64_S4, S4
*Elset, elset=__Int-1_gcs0_65_S3, internal, instance=tanpian_abaqus-7-1, generate
 111,  165,    1
*Surface, type=ELEMENT, name=_Int-1_gcs0_65, internal
__Int-1_gcs0_65_S3, S3
*Elset, elset=__Int-1_gcs0_67_S4, internal, instance=tanpian_abaqus-7-1, generate
  1,  55,   1
*Surface, type=ELEMENT, name=_Int-1_gcs0_67, internal
__Int-1_gcs0_67_S4, S4
*Elset, elset=__Int-1_gcs0_68_S4, internal, instance=tanpian_abaqus-7-1, generate
 166,  605,    1
*Surface, type=ELEMENT, name=_Int-1_gcs0_68, internal
__Int-1_gcs0_68_S4, S4
*Elset, elset=__Int-1_gcs0_71_S3, internal, instance=tanpian_abaqus-1-1-rad-2
 169, 170, 171, 172, 173, 174
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*Elset, elset=__Int-1_gcs0_71_S4, internal, instance=tanpian_abaqus-1-1-rad-2, generate
 218,  336,    2
*Surface, type=ELEMENT, name=_Int-1_gcs0_71, internal
__Int-1_gcs0_71_S3, S3
__Int-1_gcs0_71_S4, S4
*Elset, elset=__Int-1_gcs0_72_S3, internal, instance=tanpian_abaqus-1-1-rad-2
 337, 338, 339, 340, 341, 342
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*Surface, type=ELEMENT, name=_Int-1_gcs0_72, internal
__Int-1_gcs0_72_S3, S3
*Elset, elset=__Int-1_gcs0_82_S5, internal, instance=tanpian_abaqus-1-1-rad-2
 370, 371, 372, 373, 374, 375
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*Surface, type=ELEMENT, name=_Int-1_gcs0_82, internal
__Int-1_gcs0_82_S5, S5
*Elset, elset=__Int-1_gcs0_83_S4, internal, instance=tanpian_abaqus-1-1-rad-2
 4636, 4640, 4652, 4656, 4668, 4672
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*Surface, type=ELEMENT, name=_Int-1_gcs0_83, internal
__Int-1_gcs0_83_S4, S4
*Elset, elset=__Int-1_gcs0_84_S5, internal, instance=tanpian_abaqus-1-1-rad-2
 4073, 4074, 4102, 4221, 4222, 4250, 4369, 4370, 4398, 4517, 4518, 4546
*Elset, elset=__Int-1_gcs0_84_S4, internal, instance=tanpian_abaqus-1-1-rad-2
 4085, 4098, 4099, 4100, 4101, 4233
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*Surface, type=ELEMENT, name=_Int-1_gcs0_84, internal
__Int-1_gcs0_84_S5, S5
__Int-1_gcs0_84_S4, S4
*Elset, elset=__Int-1_gcs0_85_S4, internal, instance=tanpian_abaqus-1-1-rad-2
 4131, 4133, 4146, 4147, 4148, 4279
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*Elset, elset=__Int-1_gcs0_85_S5, internal, instance=tanpian_abaqus-1-1-rad-2
 4134, 4135, 4149, 4282, 4283, 4297, 4430, 4431, 4445, 4578, 4579, 4593
*Surface, type=ELEMENT, name=_Int-1_gcs0_85, internal
__Int-1_gcs0_85_S4, S4
__Int-1_gcs0_85_S5, S5
*Elset, elset=__Int-1_gcs0_93_S4, internal, instance=tanpian_abaqus-1-1-rad-2
 4154, 4179, 4180, 4302, 4327, 4328, 4450, 4475, 4476, 4598, 4623, 4624
*Elset, elset=__Int-1_gcs0_93_S5, internal, instance=tanpian_abaqus-1-1-rad-2
 4155, 4156, 4157, 4166, 4167, 4303
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*Surface, type=ELEMENT, name=_Int-1_gcs0_93, internal
__Int-1_gcs0_93_S4, S4
__Int-1_gcs0_93_S5, S5
*Elset, elset=__Int-1_gcs0_94_S4, internal, instance=tanpian_abaqus-1-1-rad-2
 4110, 4111, 4120, 4121, 4258, 4259, 4268, 4269, 4406, 4407, 4416, 4417, 4554, 4555, 4564, 4565
*Elset, elset=__Int-1_gcs0_94_S5, internal, instance=tanpian_abaqus-1-1-rad-2
 4112, 4122, 4123, 4124, 4260, 4270, 4271, 4272, 4408, 4418, 4419, 4420, 4556, 4566, 4567, 4568
*Surface, type=ELEMENT, name=_Int-1_gcs0_94, internal
__Int-1_gcs0_94_S4, S4
__Int-1_gcs0_94_S5, S5
*Elset, elset=__Int-1_gcs0_95_S6, internal, instance=tanpian_abaqus-1-1-rad-2
 4633, 4637, 4649, 4653, 4665, 4669
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*Surface, type=ELEMENT, name=_Int-1_gcs0_95, internal
__Int-1_gcs0_95_S6, S6
*Elset, elset=__Int-1_gcs0_96_S2, internal, instance=tanpian_abaqus-1-1-rad-2
   1,   2,   3,   4,   5,   6
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*Surface, type=ELEMENT, name=_Int-1_gcs0_96, internal
__Int-1_gcs0_96_S2, S2
*Elset, elset=__Int-1_gcs0_101_S1, internal, instance=tanpian_abaqus-1-1-rad-2, generate
 4625,  4640,     1
*Surface, type=ELEMENT, name=_Int-1_gcs0_101, internal
__Int-1_gcs0_101_S1, S1
*Elset, elset=__Int-1_gcs0_102_S2, internal, instance=tanpian_abaqus-1-1-rad-2, generate
 4801,  4816,     1
*Surface, type=ELEMENT, name=_Int-1_gcs0_102, internal
__Int-1_gcs0_102_S2, S2
*Elset, elset=__Int-1_gcs0_104_S3, internal, instance=tanpian_abaqus-1-1-rad-3
 169, 170, 171, 172, 173, 174
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*Elset, elset=__Int-1_gcs0_104_S4, internal, instance=tanpian_abaqus-1-1-rad-3, generate
 218,  336,    2
*Surface, type=ELEMENT, name=_Int-1_gcs0_104, internal
__Int-1_gcs0_104_S3, S3
__Int-1_gcs0_104_S4, S4
*Elset, elset=__Int-1_gcs0_105_S3, internal, instance=tanpian_abaqus-1-1-rad-3
 337, 338, 339, 340, 341, 342
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*Surface, type=ELEMENT, name=_Int-1_gcs0_105, internal
__Int-1_gcs0_105_S3, S3
*Elset, elset=__Int-1_gcs0_115_S5, internal, instance=tanpian_abaqus-1-1-rad-3
 370, 371, 372, 373, 374, 375
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*Surface, type=ELEMENT, name=_Int-1_gcs0_115, internal
__Int-1_gcs0_115_S5, S5
*Elset, elset=__Int-1_gcs0_116_S4, internal, instance=tanpian_abaqus-1-1-rad-3
 4636, 4640, 4652, 4656, 4668, 4672
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*Surface, type=ELEMENT, name=_Int-1_gcs0_116, internal
__Int-1_gcs0_116_S4, S4
*Elset, elset=__Int-1_gcs0_117_S5, internal, instance=tanpian_abaqus-1-1-rad-3
 4073, 4074, 4102, 4221, 4222, 4250, 4369, 4370, 4398, 4517, 4518, 4546
*Elset, elset=__Int-1_gcs0_117_S4, internal, instance=tanpian_abaqus-1-1-rad-3
 4085, 4098, 4099, 4100, 4101, 4233
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*Surface, type=ELEMENT, name=_Int-1_gcs0_117, internal
__Int-1_gcs0_117_S5, S5
__Int-1_gcs0_117_S4, S4
*Elset, elset=__Int-1_gcs0_118_S4, internal, instance=tanpian_abaqus-1-1-rad-3
 4131, 4133, 4146, 4147, 4148, 4279
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*Elset, elset=__Int-1_gcs0_118_S5, internal, instance=tanpian_abaqus-1-1-rad-3
 4134, 4135, 4149, 4282, 4283, 4297, 4430, 4431, 4445, 4578, 4579, 4593
*Surface, type=ELEMENT, name=_Int-1_gcs0_118, internal
__Int-1_gcs0_118_S4, S4
__Int-1_gcs0_118_S5, S5
*Elset, elset=__Int-1_gcs0_126_S4, internal, instance=tanpian_abaqus-1-1-rad-3
 4154, 4179, 4180, 4302, 4327, 4328, 4450, 4475, 4476, 4598, 4623, 4624
*Elset, elset=__Int-1_gcs0_126_S5, internal, instance=tanpian_abaqus-1-1-rad-3
 4155, 4156, 4157, 4166, 4167, 4303
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*Surface, type=ELEMENT, name=_Int-1_gcs0_126, internal
__Int-1_gcs0_126_S4, S4
__Int-1_gcs0_126_S5, S5
*Elset, elset=__Int-1_gcs0_127_S4, internal, instance=tanpian_abaqus-1-1-rad-3
 4110, 4111, 4120, 4121, 4258, 4259, 4268, 4269, 4406, 4407, 4416, 4417, 4554, 4555, 4564, 4565
*Elset, elset=__Int-1_gcs0_127_S5, internal, instance=tanpian_abaqus-1-1-rad-3
 4112, 4122, 4123, 4124, 4260, 4270, 4271, 4272, 4408, 4418, 4419, 4420, 4556, 4566, 4567, 4568
*Surface, type=ELEMENT, name=_Int-1_gcs0_127, internal
__Int-1_gcs0_127_S4, S4
__Int-1_gcs0_127_S5, S5
*Elset, elset=__Int-1_gcs0_128_S6, internal, instance=tanpian_abaqus-1-1-rad-3
 4633, 4637, 4649, 4653, 4665, 4669
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*Surface, type=ELEMENT, name=_Int-1_gcs0_128, internal
__Int-1_gcs0_128_S6, S6
*Elset, elset=__Int-1_gcs0_129_S2, internal, instance=tanpian_abaqus-1-1-rad-3
   1,   2,   3,   4,   5,   6
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*Surface, type=ELEMENT, name=_Int-1_gcs0_129, internal
__Int-1_gcs0_129_S2, S2
*Elset, elset=__Int-1_gcs0_134_S1, internal, instance=tanpian_abaqus-1-1-rad-3, generate
 4625,  4640,     1
*Surface, type=ELEMENT, name=_Int-1_gcs0_134, internal
__Int-1_gcs0_134_S1, S1
*Elset, elset=__Int-1_gcs0_135_S2, internal, instance=tanpian_abaqus-1-1-rad-3, generate
 4801,  4816,     1
*Surface, type=ELEMENT, name=_Int-1_gcs0_135, internal
__Int-1_gcs0_135_S2, S2
*Elset, elset=__Int-1_gcs0_137_S3, internal, instance=tanpian_abaqus-1-1-rad-4
 169, 170, 171, 172, 173, 174
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*Elset, elset=__Int-1_gcs0_137_S4, internal, instance=tanpian_abaqus-1-1-rad-4, generate
 218,  336,    2
*Surface, type=ELEMENT, name=_Int-1_gcs0_137, internal
__Int-1_gcs0_137_S3, S3
__Int-1_gcs0_137_S4, S4
*Elset, elset=__Int-1_gcs0_138_S3, internal, instance=tanpian_abaqus-1-1-rad-4
 337, 338, 339, 340, 341, 342
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*Surface, type=ELEMENT, name=_Int-1_gcs0_138, internal
__Int-1_gcs0_138_S3, S3
*Elset, elset=__Int-1_gcs0_148_S5, internal, instance=tanpian_abaqus-1-1-rad-4
 370, 371, 372, 373, 374, 375
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*Surface, type=ELEMENT, name=_Int-1_gcs0_148, internal
__Int-1_gcs0_148_S5, S5
*Elset, elset=__Int-1_gcs0_149_S4, internal, instance=tanpian_abaqus-1-1-rad-4
 4636, 4640, 4652, 4656, 4668, 4672
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*Surface, type=ELEMENT, name=_Int-1_gcs0_149, internal
__Int-1_gcs0_149_S4, S4
*Elset, elset=__Int-1_gcs0_150_S5, internal, instance=tanpian_abaqus-1-1-rad-4
 4073, 4074, 4102, 4221, 4222, 4250, 4369, 4370, 4398, 4517, 4518, 4546
*Elset, elset=__Int-1_gcs0_150_S4, internal, instance=tanpian_abaqus-1-1-rad-4
 4085, 4098, 4099, 4100, 4101, 4233
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*Surface, type=ELEMENT, name=_Int-1_gcs0_150, internal
__Int-1_gcs0_150_S5, S5
__Int-1_gcs0_150_S4, S4
*Elset, elset=__Int-1_gcs0_151_S4, internal, instance=tanpian_abaqus-1-1-rad-4
 4131, 4133, 4146, 4147, 4148, 4279
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*Elset, elset=__Int-1_gcs0_151_S5, internal, instance=tanpian_abaqus-1-1-rad-4
 4134, 4135, 4149, 4282, 4283, 4297, 4430, 4431, 4445, 4578, 4579, 4593
*Surface, type=ELEMENT, name=_Int-1_gcs0_151, internal
__Int-1_gcs0_151_S4, S4
__Int-1_gcs0_151_S5, S5
*Elset, elset=__Int-1_gcs0_159_S4, internal, instance=tanpian_abaqus-1-1-rad-4
 4154, 4179, 4180, 4302, 4327, 4328, 4450, 4475, 4476, 4598, 4623, 4624
*Elset, elset=__Int-1_gcs0_159_S5, internal, instance=tanpian_abaqus-1-1-rad-4
 4155, 4156, 4157, 4166, 4167, 4303
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*Surface, type=ELEMENT, name=_Int-1_gcs0_159, internal
__Int-1_gcs0_159_S4, S4
__Int-1_gcs0_159_S5, S5
*Elset, elset=__Int-1_gcs0_160_S4, internal, instance=tanpian_abaqus-1-1-rad-4
 4110, 4111, 4120, 4121, 4258, 4259, 4268, 4269, 4406, 4407, 4416, 4417, 4554, 4555, 4564, 4565
*Elset, elset=__Int-1_gcs0_160_S5, internal, instance=tanpian_abaqus-1-1-rad-4
 4112, 4122, 4123, 4124, 4260, 4270, 4271, 4272, 4408, 4418, 4419, 4420, 4556, 4566, 4567, 4568
*Surface, type=ELEMENT, name=_Int-1_gcs0_160, internal
__Int-1_gcs0_160_S4, S4
__Int-1_gcs0_160_S5, S5
*Elset, elset=__Int-1_gcs0_161_S6, internal, instance=tanpian_abaqus-1-1-rad-4
 4633, 4637, 4649, 4653, 4665, 4669
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*Surface, type=ELEMENT, name=_Int-1_gcs0_161, internal
__Int-1_gcs0_161_S6, S6
*Elset, elset=__Int-1_gcs0_162_S2, internal, instance=tanpian_abaqus-1-1-rad-4
   1,   2,   3,   4,   5,   6
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*Surface, type=ELEMENT, name=_Int-1_gcs0_162, internal
__Int-1_gcs0_162_S2, S2
*Elset, elset=__Int-1_gcs0_167_S1, internal, instance=tanpian_abaqus-1-1-rad-4, generate
 4625,  4640,     1
*Surface, type=ELEMENT, name=_Int-1_gcs0_167, internal
__Int-1_gcs0_167_S1, S1
*Elset, elset=__Int-1_gcs0_168_S2, internal, instance=tanpian_abaqus-1-1-rad-4, generate
 4801,  4816,     1
*Surface, type=ELEMENT, name=_Int-1_gcs0_168, internal
__Int-1_gcs0_168_S2, S2
*Elset, elset=__Int-1_gcs0_173_S6, internal, instance=tanpian_abaqus-6_1-1
 3365, 3367, 3369, 3385, 3387, 3389, 3405, 3407, 3409, 3425, 3427, 3429
*Surface, type=ELEMENT, name=_Int-1_gcs0_173, internal
__Int-1_gcs0_173_S6, S6
*Elset, elset=__Int-1_gcs0_174_S4, internal, instance=tanpian_abaqus-6_1-1
   2,   4,   6,   8,  10,  22
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*Elset, elset=__Int-1_gcs0_174_S6, internal, instance=tanpian_abaqus-6_1-1
  11,  13,  15,  17,  19,  31
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*Surface, type=ELEMENT, name=_Int-1_gcs0_174, internal
__Int-1_gcs0_174_S4, S4
__Int-1_gcs0_174_S6, S6
*Elset, elset=__Int-1_gcs0_178_S4, internal, instance=tanpian_abaqus-6_1-1
 1722, 1724, 1726, 1728, 1730, 1742
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*Elset, elset=__Int-1_gcs0_178_S6, internal, instance=tanpian_abaqus-6_1-1
 1731, 1733, 1735, 1737, 1739, 1751
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*Surface, type=ELEMENT, name=_Int-1_gcs0_178, internal
__Int-1_gcs0_178_S4, S4
__Int-1_gcs0_178_S6, S6
*Elset, elset=__Int-1_gcs0_179_S6, internal, instance=tanpian_abaqus-6_1-1
 1645, 1647, 1649, 1665, 1667, 1669, 1685, 1687, 1689, 1705, 1707, 1709
*Surface, type=ELEMENT, name=_Int-1_gcs0_179, internal
__Int-1_gcs0_179_S6, S6
*Elset, elset=__Int-1_gcs0_183_S6, internal, instance=tanpian_abaqus-6_1-1
 785, 787, 789, 805, 807, 809, 825, 827, 829, 845, 847, 849
*Surface, type=ELEMENT, name=_Int-1_gcs0_183, internal
__Int-1_gcs0_183_S6, S6
*Elset, elset=__Int-1_gcs0_185_S6, internal, instance=tanpian_abaqus-6_1-1
 2505, 2507, 2509, 2525, 2527, 2529, 2545, 2547, 2549, 2565, 2567, 2569
*Surface, type=ELEMENT, name=_Int-1_gcs0_185, internal
__Int-1_gcs0_185_S6, S6
*Elset, elset=__Int-1_gcs0_189_S4, internal, instance=tanpian_abaqus-6_1-1
 2582, 2584, 2586, 2588, 2590, 2602
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*Elset, elset=__Int-1_gcs0_189_S6, internal, instance=tanpian_abaqus-6_1-1
 2591, 2593, 2595, 2597, 2599, 2611
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*Surface, type=ELEMENT, name=_Int-1_gcs0_189, internal
__Int-1_gcs0_189_S4, S4
__Int-1_gcs0_189_S6, S6
*Elset, elset=__Int-1_gcs0_192_S6, internal, instance=tanpian_abaqus-6_1-1
   1,   3,  21,  23,  41,  43
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*Elset, elset=__Int-1_gcs0_192_S4, internal, instance=tanpian_abaqus-6_1-1
  12,  14,  32,  34,  52,  54
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*Surface, type=ELEMENT, name=_Int-1_gcs0_192, internal
__Int-1_gcs0_192_S6, S6
__Int-1_gcs0_192_S4, S4
*Elset, elset=__Int-1_gcs0_194_S6, internal, instance=tanpian_abaqus-6_1-1
 2581, 2583, 2601, 2603, 2621, 2623
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*Elset, elset=__Int-1_gcs0_194_S4, internal, instance=tanpian_abaqus-6_1-1
 2592, 2594, 2612, 2614, 2632, 2634
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*Surface, type=ELEMENT, name=_Int-1_gcs0_194, internal
__Int-1_gcs0_194_S6, S6
__Int-1_gcs0_194_S4, S4
*Elset, elset=__Int-1_gcs0_196_S6, internal, instance=tanpian_abaqus-6_1-1
 1721, 1723, 1741, 1743, 1761, 1763
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*Elset, elset=__Int-1_gcs0_196_S4, internal, instance=tanpian_abaqus-6_1-1
 1732, 1734, 1752, 1754, 1772, 1774
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*Surface, type=ELEMENT, name=_Int-1_gcs0_196, internal
__Int-1_gcs0_196_S6, S6
__Int-1_gcs0_196_S4, S4
*Elset, elset=__Int-1_gcs0_198_S6, internal, instance=tanpian_abaqus-6_1-1
  861,  863,  881,  883,  901,  903
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*Elset, elset=__Int-1_gcs0_198_S4, internal, instance=tanpian_abaqus-6_1-1
  872,  874,  892,  894,  912,  914
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*Surface, type=ELEMENT, name=_Int-1_gcs0_198, internal
__Int-1_gcs0_198_S6, S6
__Int-1_gcs0_198_S4, S4
*Elset, elset=__Int-1_gcs0_200_S4, internal, instance=tanpian_abaqus-6_1-1
  862,  864,  866,  868,  870,  882
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*Elset, elset=__Int-1_gcs0_200_S6, internal, instance=tanpian_abaqus-6_1-1
  871,  873,  875,  877,  879,  891
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*Surface, type=ELEMENT, name=_Int-1_gcs0_200, internal
__Int-1_gcs0_200_S4, S4
__Int-1_gcs0_200_S6, S6
*Elset, elset=__Int-1_gcs0_201_S4, internal, instance=tanpian_abaqus-6_1-1
 2516, 2518, 2520, 2536, 2538, 2540, 2556, 2558, 2560, 2576, 2578, 2580
*Surface, type=ELEMENT, name=_Int-1_gcs0_201, internal
__Int-1_gcs0_201_S4, S4
*Elset, elset=__Int-1_gcs0_202_S4, internal, instance=tanpian_abaqus-6_1-1
 1656, 1658, 1660, 1676, 1678, 1680, 1696, 1698, 1700, 1716, 1718, 1720
*Surface, type=ELEMENT, name=_Int-1_gcs0_202, internal
__Int-1_gcs0_202_S4, S4
*Elset, elset=__Int-1_gcs0_203_S4, internal, instance=tanpian_abaqus-6_1-1
 3376, 3378, 3380, 3396, 3398, 3400, 3416, 3418, 3420, 3436, 3438, 3440
*Surface, type=ELEMENT, name=_Int-1_gcs0_203, internal
__Int-1_gcs0_203_S4, S4
*Elset, elset=__Int-1_gcs0_204_S4, internal, instance=tanpian_abaqus-6_1-1
 796, 798, 800, 816, 818, 820, 836, 838, 840, 856, 858, 860
*Surface, type=ELEMENT, name=_Int-1_gcs0_204, internal
__Int-1_gcs0_204_S4, S4
*End Assembly
**
** ELEMENT CONTROLS
**
*Section Controls, name=EC-1, hourglass=ENHANCED, VISCOSITY=0.01
1., 1., 1.
*Section Controls, name=EC-2, VISCOSITY=0.01
1., 1., 1.
*Amplitude, name=Amp-1, definition=SMOOTH STEP
             0.,              0.,              1.,              1.
**
** MATERIALS
**
*Material, name=steel_elas-plastic
*Density
 7.8e-09,
*Elastic
210000., 0.28
*Plastic
380.,   0.
420., 0.04
470., 0.12
500., 0.19
522., 0.25
**
** INTERACTION PROPERTIES
**
*Surface Interaction, name=IntProp-1
1.,
*Friction, slip tolerance=0.005
 0.1,
*Surface Behavior, pressure-overclosure=LINEAR
120000.,
*Surface Interaction, name=IntProp-2
1.,
**
** BOUNDARY CONDITIONS
**
** Name: BC-2 Type: 位移/转角
*Boundary
tanpian_abaqus-7-1.Set-TW-RP, 1, 1
tanpian_abaqus-7-1.Set-TW-RP, 2, 2
tanpian_abaqus-7-1.Set-TW-RP, 3, 3
tanpian_abaqus-7-1.Set-TW-RP, 4, 4
tanpian_abaqus-7-1.Set-TW-RP, 5, 5
tanpian_abaqus-7-1.Set-TW-RP, 6, 6
** Name: BC-3 Type: 位移/转角
*Boundary
tanpian_abaqus-6_1-1.Set-TN-RP, 1, 1
tanpian_abaqus-6_1-1.Set-TN-RP, 2, 2
tanpian_abaqus-6_1-1.Set-TN-RP, 3, 3
tanpian_abaqus-6_1-1.Set-TN-RP, 4, 4
tanpian_abaqus-6_1-1.Set-TN-RP, 5, 5
tanpian_abaqus-6_1-1.Set-TN-RP, 6, 6
** Name: BC-4 Type: 位移/转角
*Boundary
Set-BAN-RP, 1, 1
Set-BAN-RP, 3, 3
Set-BAN-RP, 4, 4
Set-BAN-RP, 5, 5
Set-BAN-RP, 6, 6
**
** INTERACTIONS
**
** Interaction: Int-1
*Contact
*Contact Inclusions, ALL EXTERIOR
*Contact Property Assignment
 ,  , IntProp-1
*Surface Property Assignment, property=GEOMETRIC CORRECTION
_Int-1_gcs0_2, Circumferential, -2.07494, 28.0078, -6.6479,  -2.6957, 28.0078, -7.4319
_Int-1_gcs0_3, Circumferential, -2.07494, 28.0078, -6.6479,  -2.6957, 28.0078, -7.4319
_Int-1_gcs0_13, Circumferential, -2.07494, 28.0078, -6.6479,  -2.6957, 28.0078, -7.4319
_Int-1_gcs0_14, Circumferential, -2.07494, 28.0078, -6.6479,  -2.6957, 28.0078, -7.4319
_Int-1_gcs0_15, Circumferential, -9.8, 100.008, 7.75951,  -9.016, 100.008, 7.13875
_Int-1_gcs0_16, Circumferential, -9.8, 105.008, 7.75951,  -9.016, 105.008, 7.13875
_Int-1_gcs0_24, Circumferential, -9.8, 105.008, 7.75951,  -9.016, 105.008, 7.13875
_Int-1_gcs0_25, Circumferential, -9.8, 100.008, 7.75951,  -9.016, 100.008, 7.13875
_Int-1_gcs0_26, Circumferential, -2.07494, 28.0078, -6.6479,  -2.6957, 28.0078, -7.4319
_Int-1_gcs0_27, Circumferential, -2.07494, 28.0078, -6.6479,  -2.6957, 28.0078, -7.4319
_Int-1_gcs0_32, Circumferential, -0.212662, 27.3441, -4.2959,  0.571338, 27.3441, -4.91666
_Int-1_gcs0_33, Circumferential, -7.62734, 27.3441, 10.5035,  -8.41134, 27.3441, 11.1243
_Int-1_gcs0_44, Circumferential, -1.47076e-14, 96.2194, 8.20683e-15,  -1.47076e-14, 95.2194, 8.20683e-15
_Int-1_gcs0_47, Circumferential, -1.47076e-14, 96.2194, 8.20683e-15,  -1.47076e-14, 95.2194, 8.20683e-15
_Int-1_gcs0_49, Circumferential, -1.47076e-14, 96.2194, 8.20683e-15,  -1.47076e-14, 95.2194, 8.20683e-15
_Int-1_gcs0_50, Circumferential, -1.47076e-14, 96.2194, 8.20683e-15,  -1.47076e-14, 95.2194, 8.20683e-15
_Int-1_gcs0_54, Spherical, -6.42485e-15, 20.4929, 5.63243e-15
_Int-1_gcs0_55, Spherical, -6.42485e-15, 20.4929, 5.63243e-15
_Int-1_gcs0_56, Spherical, -6.42485e-15, 20.4929, 5.63243e-15
_Int-1_gcs0_59, Spherical, -6.42485e-15, 20.4929, 5.63243e-15
_Int-1_gcs0_60, Circumferential, -1.47076e-14, 96.2194, 8.20683e-15,  -1.47076e-14, 95.2194, 8.20683e-15
_Int-1_gcs0_61, Spherical, -6.42485e-15, 20.4929, 5.63243e-15
_Int-1_gcs0_62, Spherical, -6.42485e-15, 20.4929, 5.63243e-15
_Int-1_gcs0_63, Circumferential, -1.47076e-14, 96.2194, 8.20683e-15,  -1.47076e-14, 95.2194, 8.20683e-15
_Int-1_gcs0_64, Circumferential, -1.47076e-14, 96.2194, 8.20683e-15,  -1.47076e-14, 95.2194, 8.20683e-15
_Int-1_gcs0_65, Spherical, -6.42485e-15, 20.4929, 5.63243e-15
_Int-1_gcs0_67, Spherical, -6.42485e-15, 20.4929, 5.63243e-15
_Int-1_gcs0_68, Circumferential, -1.47076e-14, 96.2194, 8.20683e-15,  -1.47076e-14, 95.2194, 8.20683e-15
_Int-1_gcs0_71, Circumferential, -6.6479, 28.0078, 2.07494,  -7.4319, 28.0078, 2.6957
_Int-1_gcs0_72, Circumferential, -6.6479, 28.0078, 2.07494,  -7.4319, 28.0078, 2.6957
_Int-1_gcs0_82, Circumferential, -6.6479, 28.0078, 2.07494,  -7.4319, 28.0078, 2.6957
_Int-1_gcs0_83, Circumferential, -6.6479, 28.0078, 2.07494,  -7.4319, 28.0078, 2.6957
_Int-1_gcs0_84, Circumferential, 7.75951, 100.008, 9.8,  7.13875, 100.008, 9.016
_Int-1_gcs0_85, Circumferential, 7.75951, 105.008, 9.8,  7.13875, 105.008, 9.016
_Int-1_gcs0_93, Circumferential, 7.75951, 105.008, 9.8,  7.13875, 105.008, 9.016
_Int-1_gcs0_94, Circumferential, 7.75951, 100.008, 9.8,  7.13875, 100.008, 9.016
_Int-1_gcs0_95, Circumferential, -6.6479, 28.0078, 2.07494,  -7.4319, 28.0078, 2.6957
_Int-1_gcs0_96, Circumferential, -6.6479, 28.0078, 2.07494,  -7.4319, 28.0078, 2.6957
_Int-1_gcs0_101, Circumferential, -4.2959, 27.3441, 0.212662,  -4.91666, 27.3441, -0.571338
_Int-1_gcs0_102, Circumferential, 10.5035, 27.3441, 7.62734,  11.1243, 27.3441, 8.41134
_Int-1_gcs0_104, Circumferential, 2.07494, 28.0078, 6.6479,  2.6957, 28.0078, 7.4319
_Int-1_gcs0_105, Circumferential, 2.07494, 28.0078, 6.6479,  2.6957, 28.0078, 7.4319
_Int-1_gcs0_115, Circumferential, 2.07494, 28.0078, 6.6479,  2.6957, 28.0078, 7.4319
_Int-1_gcs0_116, Circumferential, 2.07494, 28.0078, 6.6479,  2.6957, 28.0078, 7.4319
_Int-1_gcs0_117, Circumferential, 9.8, 100.008, -7.75951,  9.016, 100.008, -7.13875
_Int-1_gcs0_118, Circumferential, 9.8, 105.008, -7.75951,  9.016, 105.008, -7.13875
_Int-1_gcs0_126, Circumferential, 9.8, 105.008, -7.75951,  9.016, 105.008, -7.13875
_Int-1_gcs0_127, Circumferential, 9.8, 100.008, -7.75951,  9.016, 100.008, -7.13875
_Int-1_gcs0_128, Circumferential, 2.07494, 28.0078, 6.6479,  2.6957, 28.0078, 7.4319
_Int-1_gcs0_129, Circumferential, 2.07494, 28.0078, 6.6479,  2.6957, 28.0078, 7.4319
_Int-1_gcs0_134, Circumferential, 0.212662, 27.3441, 4.2959,  -0.571338, 27.3441, 4.91666
_Int-1_gcs0_135, Circumferential, 7.62734, 27.3441, -10.5035,  8.41134, 27.3441, -11.1243
_Int-1_gcs0_137, Circumferential, 6.6479, 28.0078, -2.07494,  7.4319, 28.0078, -2.6957
_Int-1_gcs0_138, Circumferential, 6.6479, 28.0078, -2.07494,  7.4319, 28.0078, -2.6957
_Int-1_gcs0_148, Circumferential, 6.6479, 28.0078, -2.07494,  7.4319, 28.0078, -2.6957
_Int-1_gcs0_149, Circumferential, 6.6479, 28.0078, -2.07494,  7.4319, 28.0078, -2.6957
_Int-1_gcs0_150, Circumferential, -7.75951, 100.008, -9.8,  -7.13875, 100.008, -9.016
_Int-1_gcs0_151, Circumferential, -7.75951, 105.008, -9.8,  -7.13875, 105.008, -9.016
_Int-1_gcs0_159, Circumferential, -7.75951, 105.008, -9.8,  -7.13875, 105.008, -9.016
_Int-1_gcs0_160, Circumferential, -7.75951, 100.008, -9.8,  -7.13875, 100.008, -9.016
_Int-1_gcs0_161, Circumferential, 6.6479, 28.0078, -2.07494,  7.4319, 28.0078, -2.6957
_Int-1_gcs0_162, Circumferential, 6.6479, 28.0078, -2.07494,  7.4319, 28.0078, -2.6957
_Int-1_gcs0_167, Circumferential, 4.2959, 27.3441, -0.212662,  4.91666, 27.3441, 0.571338
_Int-1_gcs0_168, Circumferential, -10.5035, 27.3441, -7.62734,  -11.1243, 27.3441, -8.41134
_Int-1_gcs0_173, Circumferential, -0.689762, 29.584, 17.7165,  -1.47376, 29.584, 18.3372
_Int-1_gcs0_174, Circumferential, -3.2309e-15, 106.584, -4.08052e-15,  -3.26891e-15, 107.584, -4.12853e-15
_Int-1_gcs0_178, Circumferential, -3.2309e-15, 106.584, -4.08052e-15,  -3.26891e-15, 107.584, -4.12853e-15
_Int-1_gcs0_179, Circumferential, 0.689762, 29.584, -17.7165,  1.47376, 29.584, -18.3372
_Int-1_gcs0_183, Circumferential, -17.7165, 29.584, -0.689762,  -18.3372, 29.584, -1.47376
_Int-1_gcs0_185, Circumferential, 17.7165, 29.584, 0.689762,  18.3372, 29.584, 1.47376
_Int-1_gcs0_189, Circumferential, -3.2309e-15, 106.584, -4.08052e-15,  -3.26891e-15, 107.584, -4.12853e-15
_Int-1_gcs0_192, Circumferential, -3.2309e-15, 106.584, -4.08052e-15,  -3.26891e-15, 107.584, -4.12853e-15
_Int-1_gcs0_194, Circumferential, -3.2309e-15, 106.584, -4.08052e-15,  -3.26891e-15, 107.584, -4.12853e-15
_Int-1_gcs0_196, Circumferential, -3.2309e-15, 106.584, -4.08052e-15,  -3.26891e-15, 107.584, -4.12853e-15
_Int-1_gcs0_198, Circumferential, -3.2309e-15, 106.584, -4.08052e-15,  -3.26891e-15, 107.584, -4.12853e-15
_Int-1_gcs0_200, Circumferential, -3.2309e-15, 106.584, -4.08052e-15,  -3.26891e-15, 107.584, -4.12853e-15
_Int-1_gcs0_201, Circumferential, 0.689762, 29.584, -17.7165,  1.47376, 29.584, -18.3372
_Int-1_gcs0_202, Circumferential, -17.7165, 29.584, -0.689762,  -18.3372, 29.584, -1.47376
_Int-1_gcs0_203, Circumferential, 17.7165, 29.584, 0.689762,  18.3372, 29.584, 1.47376
_Int-1_gcs0_204, Circumferential, -0.689762, 29.584, 17.7165,  -1.47376, 29.584, 18.3372
** Interaction: Int-2
*Contact Pair, interaction=IntProp-1, type=SURFACE TO SURFACE
s_Surf-1, m_Surf-1
** ----------------------------------------------------------------
**
** STEP: Step-1
**
*Step, name=Step-1, nlgeom=YES, inc=10000
*Static, stabilize=0.0002, allsdtol=0.05, continue=NO
0.1, 1., 1e-15, 0.1
**
** BOUNDARY CONDITIONS
**
** Name: BC-2 Type: 位移/转角
*Boundary, op=NEW
tanpian_abaqus-7-1.Set-TW-RP, 1, 1
tanpian_abaqus-7-1.Set-TW-RP, 2, 2
tanpian_abaqus-7-1.Set-TW-RP, 3, 3
tanpian_abaqus-7-1.Set-TW-RP, 4, 4
tanpian_abaqus-7-1.Set-TW-RP, 5, 5
tanpian_abaqus-7-1.Set-TW-RP, 6, 6
** Name: BC-3 Type: 位移/转角
*Boundary, op=NEW
tanpian_abaqus-6_1-1.Set-TN-RP, 1, 1
tanpian_abaqus-6_1-1.Set-TN-RP, 2, 2
tanpian_abaqus-6_1-1.Set-TN-RP, 3, 3
tanpian_abaqus-6_1-1.Set-TN-RP, 4, 4
tanpian_abaqus-6_1-1.Set-TN-RP, 5, 5
tanpian_abaqus-6_1-1.Set-TN-RP, 6, 6
** Name: BC-4 Type: 位移/转角
*Boundary, op=NEW
Set-BAN-RP, 1, 1
Set-BAN-RP, 2, 2, 12.
Set-BAN-RP, 3, 3
Set-BAN-RP, 4, 4
Set-BAN-RP, 5, 5
Set-BAN-RP, 6, 6
**
** INTERACTIONS
**
** Interaction: Int-2
*Model Change, type=CONTACT PAIR, remove
s_Surf-1, m_Surf-1
**
** CONTROLS
**
*Controls, reset
*Controls, parameters=time incrementation
, , , , , , , 20, , ,
*Controls, parameters=field, field=displacement
0.01, , , , , , ,
*Controls, parameters=field, field=hydrostatic fluid pressure
0.01, , , , , , ,
*Controls, parameters=field, field=rotation
0.01, , , , , , ,
*Controls, parameters=field, field=electrical potential
0.01, , , , , , ,
**
** OUTPUT REQUESTS
**
*Restart, write, frequency=0
**
** FIELD OUTPUT: F-Output-1
**
*Output, field, variable=PRESELECT, number interval=10
**
** HISTORY OUTPUT: H-Output-1
**
*Output, history, variable=PRESELECT
*End Step
** ----------------------------------------------------------------
**
** STEP: Step-2
**
*Step, name=Step-2, nlgeom=YES, inc=10000
*Static, stabilize=0.0002, allsdtol=0.05, continue=NO
0.1, 1., 1e-15, 0.1
**
** BOUNDARY CONDITIONS
**
** Name: BC-4 Type: 位移/转角
*Boundary
Set-BAN-RP, 2, 2
**
** OUTPUT REQUESTS
**
*Restart, write, frequency=0
**
** FIELD OUTPUT: F-Output-1
**
*Output, field, variable=PRESELECT, number interval=10
**
** HISTORY OUTPUT: H-Output-1
**
*Output, history, variable=PRESELECT
*End Step
** ----------------------------------------------------------------
**
** STEP: Step-3
**
*Step, name=Step-3, nlgeom=YES, extrapolation=NO, inc=10000, unsymm=YES
*Static, stabilize=0.0002, allsdtol=0.05, continue=NO
0.1, 1., 1e-15, 0.1
**
** BOUNDARY CONDITIONS
**
** Name: BC-4 Type: 位移/转角
*Boundary
Set-BAN-RP, 2, 2, -13.6
**
** INTERACTIONS
**
** Interaction: Int-2
*Model Change, type=CONTACT PAIR, add
s_Surf-1, m_Surf-1
** Contact Controls for Interaction: Int-2
*Contact Controls, main=m_Surf-1, secondary=s_Surf-1, stabilize=0.1
**
** OUTPUT REQUESTS
**
*Restart, write, frequency=0
**
** FIELD OUTPUT: F-Output-1
**
*Output, field, variable=PRESELECT, number interval=10
**
** HISTORY OUTPUT: H-Output-1
**
*Output, history, variable=PRESELECT
*End Step
** ----------------------------------------------------------------
**
** STEP: Step-4
**
*Step, name=Step-4, nlgeom=YES, inc=10000
*Static, stabilize=0.0002, allsdtol=0.05, continue=NO
0.1, 1., 1e-15, 0.1
**
** BOUNDARY CONDITIONS
**
** Name: BC-4 Type: 位移/转角
*Boundary
Set-BAN-RP, 2, 2, 12.
**
** OUTPUT REQUESTS
**
*Restart, write, frequency=0
**
** FIELD OUTPUT: F-Output-1
**
*Output, field, variable=PRESELECT, number interval=10
**
** HISTORY OUTPUT: H-Output-1
**
*Output, history, variable=PRESELECT
*End Step
