*Heading
** Large cantilever solid bending with 2000 elements
*Node
1, 0.000000, 0.000000, 0.000000
2, 1.000000, 0.000000, 0.000000
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*Nset, nset=FIX
1,22,43,64,85,106
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*Nset, nset=LOADTIP
2226,2247,2268,2289,2310,2331
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*Material, name=STEEL
*Elastic
2.1e11,0.3
*Density
7850
*Element, type=C3D8, elset=EALL
1,1,2,23,22,442,443,464,463
2,2,3,24,23,443,444,465,464
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*Boundary
FIX,1,6,0.0
*Cload
LOADTIP,3,-5.0e3
*Step, name=CANTILEVER2000
*Static
1.0
*End Step
