*Heading
** two-block contact case with 144 C3D8 elements
*Node
1, 0.000000, 0.000000, 0.000000
2, 1.000000, 0.000000, 0.000000
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*Nset, nset=FIXLOW
1,2,3,4,5,6
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*Nset, nset=MASTER_SURF
99,100,101,102,103,104
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*Nset, nset=SLAVE_SURF
148,149,150,151,152,153
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*Nset, nset=TOPUP
246,247,248,249,250,251
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*Material, name=MAT
*Elastic
2.0e11, 0.3
*Element, type=C3D8, elset=LOWER
1,1,2,9,8,50,51,58,57
2,2,3,10,9,51,52,59,58
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*Element, type=C3D8, elset=UPPER
73,148,149,156,155,197,198,205,204
74,149,150,157,156,198,199,206,205
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*Boundary
FIXLOW,1,6,0.0
*Contact Pair, master=MASTER_SURF, slave=SLAVE_SURF, penalty=2.0e8, friction=0.2
*Cload
TOPUP,3,-8.0e3
*Step, name=CONTACT_NL, nlgeom=YES
*Static
0.1
*Controls
40,1e-6,10,1.2,0.5,1e-5,5e-2
*End Step
