*Heading
** 3D solid block with 200 C3D8 elements
*Node
1, 0.000000, 0.000000, 0.000000
2, 1.000000, 0.000000, 0.000000
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*Nset, nset=BOTTOM
1,2,3,4,5,6
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*Nset, nset=TOP
243,244,245,246,247,248
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*Material, name=STEEL
*Elastic
2.1e11, 0.3
*Element, type=C3D8, elset=EBLK
1,1,2,13,12,122,123,134,133
2,2,3,14,13,123,124,135,134
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*Boundary
BOTTOM,1,6,0.0
*Cload
TOP,3,-2.0e4
*Step, name=SOLID200
*Static
1.0
*End Step
